(x - a)^2 + b^2 == 0
(x - a)^2 == -b^2
x - a == sqrt(-b^2) == sqrt(-1)*b
-x + a == sqrt(-b^2) == sqrt(-1)*b
x == a + b*sqrt(-1)
x == a - b*sqrt(-1)
a := 13 - 5i
b := 4 + 7i
a + b → 17 + 2i
a - b → 9 - 12i
a*b → 87 + 71i
a/b float → 0.261538461538 - 1.70769230769i
